Лесн := (48700 - 3500 - 5800 - 100 - 9400 - 8600 - 3900 - 8700)/2 = 4350
в := 6000
Ст1 := 100
Ст2 := 200
Кор := 3000
h := 2500
Д108Мин := Ст2 + Кор + Ст1 + Лесн + Ст1 + h*2 = 12750
Д106Мин := 0 + h*2 = 5000
Д108Макс := в + Ст2 + Кор + Ст1 + 5800 + Ст1 + 5800 + в + h*2 = 32000
Д106Макс := 2500 + в + h*2 = 13500
Д106С := (Д106Макс + Д106Мин)/2 = 9250
Д108С := (Д108Макс + Д108Мин)/2 = 22375
Д105Мин := 2500 + Ст2 + h*2 = 7700
Д109Мин := Ст2 + Кор + Ст1 + h*2 = 8300
Д105Макс := 3700 + Д105Мин + в + h*2 = 22400
Д109Макс := в + Д109Мин + в + 5800 + h*2 = 31100
Д105С := (Д105Макс + Д105Мин)/2 = 15050
Д109С := (Д109Макс + Д109Мин)/2 = 19700
Д104Мин := Ст2 + Ст1 + 3700 + h*2 = 9000
Д111Мин := Д109Мин + Ст2 + Ст2 + 2800 + h*2 = 16500
Д104Макс := Д105Макс + Ст1 + 8500 + h*2 = 36000
Д111Макс := Д111Мин + в + 2500 + в + 5800 + h*2 = 41800
Д111С := (Д111Макс + Д111Мин)/2 = 29150
Д104С := (Д104Макс + Д104Мин)/2 = 22500
Д107Мин := Ст1 + Лесн + Ст1 + h*2 = 9550
Д112Мин := Д111Мин + 5800 + Ст1 + h*2 = 27400
Д107Макс := в + Д107Мин + 8700 + h*2 = 29250
Д112Макс := Д111Макс + 5800 + Ст1 + h*2 = 52700
Д107С := (Д107Макс + Д107Мин)/2 = 19400
Д112С := (Д112Макс + Д112Мин)/2 = 40050
Д113Мин := Д112Мин + 5800 + Ст2 + h*2 = 38400
Д113Макс := Д112Макс + 5800 + Ст2 + h*2 = 63700
Д113С := (Д113Макс + Д113Мин)/2 = 51050
Д114Мин := Д113Мин + 9200 + Ст1 + h*2 = 52700
Д114Макс := Д113Макс + 9200 + Ст1 + h*2 = 78000
Д114С := (Д114Макс + Д114Мин)/2 = 65350
Эт1 := (Д106С*2 + Д105С*3 + Д104С*2 + Д107С*10 + Д108С*6 + Д109С*3 + Д111С*6 + Д112С*6 + Д113С*6 + Д114С*10)/1000 = 1871
Д204Мин := Ст2 + Кор + Ст1 + h*2 = 8300
Д209Мин := 0 + h*2 = 5000
Д204Макс := Д204Мин + в + в + 6440 + h*2 = 31740
Д209Макс := 3000 + в + h*2 = 14000
Д209С := (Д209Макс + Д209Мин)/2 = 9500
Д204С := (Д204Макс + Д204Мин)/2 = 20020
Д208Мин := 3000 + Ст1 + h*2 = 8100
Д203Мин := Д204Мин + 250 + Ст1 + h*2 = 13650
Д208Макс := Д209Макс + Ст1 + 6000 + h*2 = 25100
Д203Макс := Д203Мин + в + 8740 + в + h*2 = 39390
Д208С := (Д208Макс + Д208Мин)/2 = 16600
Д203С := (Д203Макс + Д203Мин)/2 = 26520
Д207Мин := Д208Мин + Ст2 + 6000 + h*2 = 19300
Д201Мин := Д203Мин + 8970 + Ст1 + Лесн + Ст1 + h*2 = 32170
Д207Макс := Д207Мин + в + h*2 = 30300
Д201Макс := в + Д201Мин + 8970 + в + h*2 = 58140
Д207С := (Д207Макс + Д207Мин)/2 = 24800
Д201С := (Д201Макс + Д201Мин)/2 = 45155
Д205Мин := Д207Мин + Ст2 + Кор + Ст1 + h*2 = 27600
Д210Мин := Ст2 + h*2 = 5200
Д205Макс := в + Д205Мин + в + 5750 + h*2 = 50350
Д210Макс := в + Д210Мин + 6000 + h*2 = 22200
Д205С := (Д205Макс + Д205Мин)/2 = 38975
Д210С := (Д210Макс + Д210Мин)/2 = 13700
Д211Мин := Д210Мин + Ст1 + 6000 + h*2 = 16300
Д211Макс := Д210Макс + 6000 + Ст1 + h*2 = 33300
Д211С := (Д211Макс + Д211Мин)/2 = 24800
Д212Мин := Д111Мин + 6000 + Ст2 + h*2 = 27700
Д212Макс := Д111Макс + 6000 + Ст2 + h*2 = 53000
Д212С := (Д212Макс + Д212Мин)/2 = 40350
Д213Мин := Д212Мин + 8970 + Ст2 + h*2 = 41870
Д213Макс := Д212Макс + 8970 + Ст2 + h*2 = 67170
Д213С := (Д213Макс + Д213Мин)/2 = 54520
Эт2 := (Д201С*2 + Д203С*10 + Д204С*7 + Д205С*6 + Д207С*6 + Д208С*2 + Д209С*3 + Д210С*6 + Д211С*6 + Д212С*6 + Д213С*10)/1000 = 1958.3
Д306Мин := 0 + h*2 = 5000
Д309Мин := Ст2 + Кор + Ст2 + Лесн + Ст1 + Ст2 + h*2 = 13050
Д306Макс := 2900 + в + h*2 = 13900
Д309Макс := в + Д309Мин + в + 5900 + h*2 = 35950
Д306С := (Д306Макс + Д306Мин)/2 = 9450
Д309С := (Д309Макс + Д309Мин)/2 = 24500
Д305Мин := 2900 + Ст1 + h*2 = 8000
Д310Мин := Ст2 + Кор + Ст2 + h*2 = 8400
Д305Макс := 6000 + Д305Мин + в + h*2 = 25000
Д310Макс := в + Д309Мин + в + 9000 + h*2 = 39050
Д305С := (Д305Макс + Д305Мин)/2 = 16500
Д310С := (Д310Макс + Д310Мин)/2 = 23725
Д304Мин := Д305Мин + 6000 + Ст1 + h*2 = 19100
Д311Мин := Д310Мин + Ст2 + 2800 + h*2 = 16400
Д304Макс := Д304Мин + в + 5000 + h*2 = 35100
Д311Макс := Д311Мин + в + в + 5700 + h*2 = 39100
Д304С := (Д304Макс + Д304Мин)/2 = 27100
Д311С := (Д311Макс + Д311Мин)/2 = 27750
Д301Мин := Д304Мин + Ст2 + 9200 + Ст1 + Лесн + Ст1 + 2900 + Ст2 + h*2 = 41150
Д313Мин := Д311Мин + 5700 + Ст1 + 2700 + Ст2 + h*2 = 30100
Д301Макс := в + Д301Мин + 5800 + h*2 = 57950
Д313Макс := Д313Мин + 9000 + в + в + h*2 = 56100
Д301С := (Д301Макс + Д301Мин)/2 = 49550
Д313С := (Д313Макс + Д313Мин)/2 = 43100
Д308Мин := Ст1 + Лесн + Ст2 + 2900 + Ст2 + h*2 = 12750
Д314Мин := Д313Мин + 9000 + Ст2 + h*2 = 44300
Д308Макс := Д308Мин + 6000 + в + h*2 = 29750
Д314Макс := Д314Мин + 9000 + в + в + h*2 = 70300
Д308С := (Д308Макс + Д308Мин)/2 = 21250
Д314С := (Д314Макс + Д314Мин)/2 = 57300
Эт3 := (Д306С*3 + Д305С*2 + Д304С*5 + Д301С*6 + Д308С*6 + Д309С*6 + Д310С*10 + Д311С*3 + Д313С*10 + Д314С*2)/1000 = 1634.75
Д406Мин := 0 + h*2 = 5000
Д408Мин := Ст2 + Кор + Ст2 + h*2 = 8400
Д406Макс := 2760 + в + h*2 = 13760
Д408Макс := в + Д408Мин + 12000 + h*2 = 31400
Д406С := (Д406Макс + Д406Мин)/2 = 9380
Д408С := (Д408Макс + Д408Мин)/2 = 19900
Д405Мин := 2760 + Ст1 + h*2 = 7860
Д409Мин := Ст2 + Кор + Ст2 + Ст2 + h*2 = 8600
Д405Макс := 3680 + Д405Мин + в + h*2 = 22540
Д409Макс := в + Д409Мин + 9200 + h*2 = 28800
Д405С := (Д405Макс + Д405Мин)/2 = 15200
Д409С := (Д409Макс + Д409Мин)/2 = 18700
Д404Мин := Д405Мин + 3680 + Ст2 + h*2 = 16740
Д410Мин := Д409Мин + Ст1 + 9200 + h*2 = 22900
Д404Макс := Д404Мин + в + 6740 + h*2 = 34480
Д410Макс := Д410Мин + в + 12000 + h*2 = 45900
Д404С := (Д404Макс + Д404Мин)/2 = 25610
Д410С := (Д410Макс + Д410Мин)/2 = 34400
Д402Мин := Д404Мин + Ст2 + 8970 + Ст2 + Лесн + Ст1 + 8740 + h*2 = 44300
Д411Мин := Д410Мин + 12000 + Ст1 + h*2 = 40000
Д402Макс := в + Д301Мин + 5520 + h*2 = 57670
Д411Макс := Д411Мин + 9200 + в + h*2 = 60200
Д402С := (Д402Макс + Д402Мин)/2 = 50985
Д411С := (Д411Макс + Д411Мин)/2 = 50100
Д407Мин := Ст1 + Лесн + Ст2 + h*2 = 9650
Д407Макс := Д407Мин + 8740 + в + h*2 = 29390
Д407С := (Д407Макс + Д407Мин)/2 = 19520
Эт4 := (Д406С*2 + Д405С*3 + Д404С*2 + Д402С*1 + Д407С*2 + Д408С*2 + Д409С*2 + Д410С*2 + Д411С*2)/1000 = 451.805
