l := 1
m := 48
p := l/m = 0.0208333
n := 0
f(x) := p^x*(1 - p)
f(0) = 0.979167
f(1) = 0.0203993
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f(2) = 0.000424986
f(3) = 8.85387e-6
f(4) = 1.84456e-7
f(5) = 3.84282e-9
f(6) = 8.00588e-11
f(7) = 1.66789e-12
f(8) = 3.47478e-14
f(9) = 7.23912e-16
f(10) = 1.50815e-17
L := p/(1 - p) = 0.0212766
Sl := p/(1 - p)^2 = 0.0217293
Lq := p^2/(1 - p) = 0.000443262
Slq := p^2*(1 + p - p^2)/(1 - p)^2 = 0.000461928
Ts := 1/(m*(1 - p)) = 0.0212766
Sts := Ts^2 = 0.000452694
Tl := 1/l = 1
Tm := 1/m = 0.0208333
dt := Tl + Tm = 1.02083
dt*20 = 20.4167
dt*40 = 40.8333
dt*60 = 61.25
dt*80 = 81.6667
dt*100 = 102.083
dt*120 = 122.5
dt*140 = 142.917
dt*160 = 163.333
dt*180 = 183.75
dt*200 = 204.167
