lambda := 3
i := 1 .. 4
x[i] := 0
my := 2
w := 0
Given
k := 3
-5*x[1] + 3*x[2] + 2*x[3] + 0*x[4] == 0
y := lambda/my = 1.5  # нагрузка системы
2*x[1] - 5*x[2] + 0*x[3] + 2*x[4] == 0
[
    -5*x[1] + 3*x[2] + 2*x[3] + 0*x[4] == 0;
    2*x[1] - 5*x[2] + 0*x[3] + 2*x[4] == 0;
    2*x[1] + 0*x[2] - 4*x[3] + 3*x[4] == 0;
    0*x[1] + 2*x[2] + 2*x[3] - 5*x[4] == 0;
    x[1] + x[2] + x[3] + x[4] == 1
]
p := lambda/(my*k) = 0.5  # загрузка системы
2*x[1] + 0*x[2] - 4*x[3] + 3*x[4] == 0
n := 1 - p = 0.5  # коэффициент простоя системы
0*x[1] + 2*x[2] + 2*x[3] - 5*x[4] == 0
Pin := 1 - p/y*k = 0  # вероятность потери заявки
x[1] + x[2] + x[3] + x[4] == 1
Pio := 1 - Pin = 1  # вероятность обслуживания заявки
[x1; x2; x3; x4]
Lambda := Pio*lambda = 3  # производительность системы
[x1; x2; x3; x4] := Find(x)  # error: No solution was found.
LAMBDA := Pin*lambda = 0  # интенсивность потока потерянных заявок
P := Lambda/(k*my) = 0.5  # загрузка системы
u := w + 1/my = 0.5  # время пребывания заявки в системе
m := Lambda*u = 1.5  # среднее число заявок в системе
