I12(x, y) := tan(π/2*x - 1) + 0.01*tan(π/2*x - y)*y - 0.5*y
I21(x, y) := -sin(π/2*x) + 0.1*cos(π/2*x)*y + 0.2*y + 4
x1 := 0
y1 := 0
J121(x, y) := 0.08*y - 0.05*x*y - 0.03*x - 0.06
J122(x, y) := 0.4*y - 0.01*x*y + 0.014*x + 0.2
x2 := 0.5
y2 := 0.5
J123(x, y) := 0.12*y - 0.33*x*y - 0.03*x - 0.11
x3 := 1
y3 := 1
J211(x, y) := -0.012*y - 0.03*x*y + 0.14*x - 0.11
x4 := 1.5
y4 := 1.5
J212(x, y) := 0.2*y - 0.01*x*y + x + 0.44
J213(x, y) := -0.095*y - 0.009*x*y + 0.052*x + 0.64
x5 := 2
y5 := 2
I12(x1, y1) = -1.55741
I12(x2, y1) = -0.217958
I12(x3, y1) = 0.642093
I12(x4, y1) = 4.58804
I12(x5, y1) = -1.55741
I21(x1, y1) = 4
I21(x2, y1) = 3.29289
I21(x3, y1) = 3
I21(x4, y1) = 3.29289
I21(x5, y1) = 4
I12(x1, y2) = -1.81014
I12(x2, y2) = -0.466491
I12(x3, y2) = 0.401245
I12(x4, y2) = 4.321
I12(x5, y2) = -1.81014
I21(x1, y2) = 4.15
I21(x2, y2) = 3.42825
I21(x3, y2) = 3.1
I21(x4, y2) = 3.35754
I21(x5, y2) = 4.05
I12(x1, y3) = -2.07298
I12(x2, y3) = -0.720138
I12(x3, y3) = 0.148514
I12(x4, y3) = 4.13392
I12(x5, y3) = -2.07298
I21(x1, y3) = 4.3
I21(x2, y3) = 3.5636
I21(x3, y3) = 3.2
I21(x4, y3) = 3.42218
I21(x5, y3) = 4.1
I12(x1, y4) = -2.51893
I12(x2, y4) = -0.980972
I12(x3, y4) = -0.106844
I12(x4, y4) = 3.85533
I12(x5, y4) = -2.51893
I21(x1, y4) = 4.45
I21(x2, y4) = 3.69896
I21(x3, y4) = 3.3
I21(x4, y4) = 3.48683
I21(x5, y4) = 4.15
I12(x1, y5) = -2.51371
I12(x2, y5) = -1.27171
I12(x3, y5) = -0.367061
I12(x4, y5) = 3.59548
I12(x5, y5) = -2.51371
I21(x1, y5) = 4.6
I21(x2, y5) = 3.83431
I21(x3, y5) = 3.4
I21(x4, y5) = 3.55147
I12(x5, y5) = -2.51371
F12 := (1 - 0.03)*(1 - 0.02)*(1 - 0.04)*I12(x4, y1) - (0.03*J121(x4, y1) + 0.02*J122(x4, y1) + 0.04*J123(x4, y1))
F21 := (1 - 0.02)*(1 - 0.04)*(1 - 0.002)*I21(x1, y5) - (0.02*J211(x1, y5) + 0.04*J212(x1, y5) + 0.002*J213(x1, y5))
F12 = 4.19186
F21 = 4.2872
S11 := 0.03*0.02*0.04 = 2.4e-5
S12 := 0.03*0.015*0.02 = 9e-6
S13 := 0.06*0.02*0.01 = 1.2e-5
S21 := 0.02*0.04*0.002 = 1.6e-6
S22 := 0.09*0.01*0.001 = 9e-7
S23 := 0.12*0.03*0.015 = 5.4e-5
F21I := (1 - 0.12)*(1 - 0.03)*(1 - 0.015)*I21(x5, y4) - (0.12*J211(x5, y4) + 0.03*J212(x5, y4) + 0.015*J213(x5, y4)) = 3.39195
