I12(x, y) := sin(π/2*x) + 0.01*sin(π/2*x)*y - 0.4*y
I21(x, y) := cos(π/2*x) + 0.1*cos(π/2*x)*y + 0.8*y + 1
x1 := 0
y1 := 0
J121(x, y) := 0.04*y - 0.05*x*y - 0.03*x - 0.6
x2 := 0.5
y2 := 0.5
J122(x, y) := 0.1*y - 0.01*x*y + x + 0.3
J123(x, y) := 0.12*y - 0.33*x*y - 0.05*x + 0.11
x3 := 1
y3 := 1
J211(x, y) := -0.015*y - 0.03*x*y + 0.14*x - 0.11
x4 := 1.5
y4 := 1.5
J212(x, y) := 0.2*y - 0.01*x*y + 0.1*x - 0.44
x5 := 2
y5 := 2
J213(x, y) := -0.095*y - 0.009*x*y + 0.052*x + 0.64
I12(x1, y1) = 0
I12(x2, y1) = 0.707107
I12(x3, y1) = 1
I12(x4, y1) = 0.707107
I12(x5, y1) = 1.22461e-16
I21(x1, y1) = 2
I21(x2, y1) = 1.70711
I21(x3, y1) = 1
I21(x4, y1) = 0.292893
I21(x5, y1) = 0
I12(x1, y2) = -0.2
I12(x2, y2) = 0.510642
I12(x3, y2) = 0.805
I12(x4, y2) = 0.510642
I12(x5, y2) = -0.2
I21(x1, y2) = 2.45
I21(x2, y2) = 2.14246
I21(x3, y2) = 1.4
I21(x4, y2) = 0.657538
I21(x5, y2) = 0.35
I12(x1, y3) = -0.4
I12(x2, y3) = 0.314178
I12(x3, y3) = 0.61
I12(x4, y3) = 0.314178
I12(x5, y3) = -0.4
I21(x1, y3) = 2.9
I21(x2, y3) = 2.57782
I21(x3, y3) = 1.8
I21(x4, y3) = 1.02218
I21(x5, y3) = 0.7
I12(x1, y4) = -0.6
I12(x2, y4) = 0.117713
I12(x3, y4) = 0.415
I12(x4, y4) = 0.117713
I12(x5, y4) = -0.6
I21(x1, y4) = 3.35
I21(x2, y4) = 3.01317
I21(x3, y4) = 2.2
I21(x4, y4) = 1.38683
I21(x5, y4) = 1.05
I12(x1, y5) = -0.8
I12(x2, y5) = -0.0787511
I12(x3, y5) = 0.22
I12(x4, y5) = -0.0787511
I12(x5, y5) = -0.8
I21(x1, y5) = 3.8
I21(x2, y5) = 3.44853
I21(x3, y5) = 2.6
I21(x4, y5) = 1.75147
I12(x5, y5) = -0.8
F12 := (1 - 0.03)*(1 - 0.01)*(1 - 0.06)*I12(x3, y1) - (0.03*J121(x3, y1) + 0.01*J122(x3, y1) + 0.06*J123(x3, y1))
F21 := (1 - 0.08)*(1 - 0.05)*(1 - 0.002)*I21(x1, y5) - (0.08*J211(x1, y5) + 0.05*J212(x1, y5) + 0.002*J213(x1, y5))
F12 = 0.904982
F21 = 3.32686
S11 := 0.03*0.01*0.06 = 1.8e-5
S12 := 0.035*0.015*0.01 = 5.25e-6
S13 := 0.07*0.02*0.01 = 1.4e-5
S21 := 0.08*0.05*0.002 = 8e-6
S22 := 0.09*0.01*0.004 = 3.6e-6
S23 := 0.12*0.03*0.015 = 5.4e-5
F21I := (1 - 0.12)*(1 - 0.03)*(1 - 0.015)*I21(x5, y4) - (0.12*J211(x5, y4) + 0.03*J212(x5, y4) + 0.015*J213(x5, y4))
F21I = 0.866418
