x0 := 20
x1 := 40
y0 := 0.05
y1 := 0.025
n := 4
x2 := 60
x3 := 80
y2 := 0.017
y3 := 0.0125
A1 := x0 + x1 + x2 + x3 = 200
B1 := y0 + y1 + y2 + y3 = 0.1045
C1 := (x0^2 + x1^2 + x2^2 + x3^2) = 12000
D1 := x0*y0 + x1*y1 + x2*y2 + x3*y3 = 4.02
E1 := x0^3 + x1^3 + x2^3 + x3^3 = 800000
F1 := x0^4 + x1^4 + x2^4 + x3^4 = 56640000
G1 := x0^2*y0 + x1^2*y1 + x2^2*y2 + x3^2*y3 = 201.2
a0 := det([n, A1, C1; A1, C1, E1; C1, E1, F1]) = 5.12e9
a1 := det([B1, A1, C1; D1, C1, E1; G1, E1, F1])/a0 = 0.081875
b1 := det([n, B1, C1; A1, D1, E1; C1, G1, F1])/a0 = -0.00188375
c1 := det([n, A1, B1; A1, C1, D1; C1, E1, G1])/a0 = 1.28125e-5
a2 := det([n, A1; A1, C1]) = 8000
b2 := det([B1, A1; D1, C1])/a2 = 0.05625
c2 := det([n, B1; A1, D1])/a2 = -0.0006025
f(x) := c1*x^2 + b1*x + a1
f1(x) := c2*x + b2
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d0 := y0 - f1(x0) = 0.0058
d10 := y0 - f(x0) = 0.000675
d1 := y1 - f1(x1) = -0.00715
d11 := y1 - f(x1) = -0.002025
d2 := y2 - f1(x2) = -0.0031
d12 := y2 - f(x2) = 0.002025
d3 := y3 - f1(x3) = 0.00445
d13 := y3 - f(x3) = -0.000675
d0^2 = 3.364e-5
d10^2 = 4.55625e-7
d1^2 = 5.11225e-5
d11^2 = 4.10063e-6
d2^2 = 9.61e-6
d12^2 = 4.10062e-6
d3^2 = 1.98025e-5
d13^2 = 4.55625e-7
S1 := d0^2 + d1^2 + d2^2 + d3^2 = 0.000114175
S2 := d10^2 + d11^2 + d12^2 + d13^2 = 9.1125e-6
